*Heading
** Job name: Dir_ten Model name: Model-tension-noCZM
** Generated by: Abaqus/CAE 6.12-1
*Preprint, echo=NO, model=NO, history=NO, contact=NO
**
** PARTS
**
*Part, name=Bottom
*Node
   6002,           0., 0.0250000004, 0.0299999993
   6003,           0.,           0., 0.0299999993
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*Element, type=C3D8
5239, 6507, 6973, 8677, 6877, 6394, 6416, 6773, 6449
5240, 6973, 6974, 8678, 8677, 6416, 6417, 6774, 6773
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*Nset, nset=Set-1, generate
  6394,  12004,      1
*Elset, elset=Set-1, generate
 5239,  9943,     1
** Section: concrete
*Solid Section, elset=Set-1, material=Concrete_com
,
*End Part
**
**
** ASSEMBLY
**
*Assembly, name=Assembly
**
*Instance, name=Bottom-1, part=Bottom
*End Instance
**
*Nset, nset=Set-y, instance=Bottom-1
 6403, 6404, 6405, 6406, 6410, 6411
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*Elset, elset=Set-y, instance=Bottom-1
 6209, 6210, 6211, 6212, 6213, 6274
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*Nset, nset=Set-X, instance=Bottom-1
 6394, 6395, 6396, 6397, 6410, 6411
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*Elset, elset=Set-X, instance=Bottom-1
 5239, 5240, 5241, 5242, 5243, 5244
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*Nset, nset=Set-bottom, instance=Bottom-1
 6412, 6413, 6414, 6415, 6725, 6726
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*Elset, elset=Set-bottom, instance=Bottom-1, generate
 9775,  9943,     1
*Nset, nset=Set-top, instance=Bottom-1
 6394, 6397, 6400, 6401, 6405, 6406
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*Elset, elset=Set-top, instance=Bottom-1
 5239, 5253, 5267, 5281, 5295, 5309
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*Elset, elset=_Surf-M-bottom_S2, internal, instance=Bottom-1, generate
 9775,  9943,     1
*Surface, type=ELEMENT, name=Surf-M-bottom
_Surf-M-bottom_S2, S2
*End Assembly
**
** MATERIALS
**
*Material, name=Cohesive
*Damage Initiation, criterion=MAXS
 6e+06, 1.2e+07, 1.2e+07
*Damage Evolution, type=ENERGY
23000.,
*Elastic, type=TRACTION
 1.2e+13, 1.2e+13, 1.2e+13
*Material, name=Concrete_com
*Depvar
     65,
*User Material, constants=9
 2.7e+10,    0.2255,      485., 0.0048417,      35.9,      20.6, 5.013e-06,       95.
     0.095,
*Material, name=Elas
*Elastic
 3.8e+10, 0.3
**
** INTERACTION PROPERTIES
**
*Surface Interaction, name=IntProp-1
1.,
*Friction
0.,
*Surface Behavior, pressure-overclosure=HARD
**
** BOUNDARY CONDITIONS
**
** Name: BC-x Type: Symmetry/Antisymmetry/Encastre
*Boundary
Set-X, XSYMM
** Name: BC-y Type: Symmetry/Antisymmetry/Encastre
*Boundary
Set-y, YSYMM
** Name: BC-z Type: Symmetry/Antisymmetry/Encastre
*Boundary
Set-bottom, ZSYMM
** ----------------------------------------------------------------
**
** STEP: Step-1
**
*Step, name=Step-1, nlgeom=YES, inc=1000000
*Static
0.001, 1., 1e-20, 0.002
**
** BOUNDARY CONDITIONS
**
** Name: BC-pull Type: Displacement/Rotation
*Boundary
Set-top, 3, 3, -1e-05
**
** CONTROLS
**
*Controls, reset
*Controls, parameters=time incrementation
, , , , , , , 15, , ,
**
** OUTPUT REQUESTS
**
*Restart, write, frequency=0
**
** FIELD OUTPUT: F-Output-1
**
*Output, field, frequency=10
*Node Output
U,
*Element Output, directions=YES
E, S, SDV
**
** HISTORY OUTPUT: H-Output-1
**
*Output, history, variable=PRESELECT
*End Step
