*Heading
** Job name: Uni_com Model name: Model-cylinder
** Generated by: Abaqus/CAE 6.12-1
*Preprint, echo=NO, model=NO, history=NO, contact=NO
**
** PARTS
**
*Part, name=Part-1
*Node
      1,           0., 0.0500000007, 0.0480000004
      2,           0., 0.0500000007,  0.100000001
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*Element, type=C3D8
   1,  108,  615, 2094,  579,    1,   22,  363,   63
   2,  615,  616, 2095, 2094,   22,   23,  364,  363
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*Nset, nset=Set-1, generate
    1,  4784,     1
*Elset, elset=Set-1, generate
    1,  4000,     1
** Section: Section-1
*Solid Section, elset=Set-1, material=Concrete_com
,
*End Part
**
**
** ASSEMBLY
**
*Assembly, name=Assembly
**
*Instance, name=Part-1-1, part=Part-1
*End Instance
**
*Nset, nset=Set-bottom, instance=Part-1-1
   13,   14,   15,   16,   17,   18
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*Elset, elset=Set-bottom, instance=Part-1-1
  792,  804,  816,  828,  840,  852
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*Nset, nset=Set-y, instance=Part-1-1
    9,   10,   11,   12,   13,   15
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*Elset, elset=Set-y, instance=Part-1-1
  400,  410,  420,  430,  440,  450
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*Nset, nset=Set-X, instance=Part-1-1
    1,    2,    5,    6,   17,   18
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*Elset, elset=Set-X, instance=Part-1-1
    1,    2,    3,    4,    5,    6
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*Nset, nset=Set-4, instance=Part-1-1
    2,    3,    6,    7,    9,   11
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*Elset, elset=Set-4, instance=Part-1-1
   13,   26,   39,   52,   65,   78
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*Elset, elset=_Surf-top_S4, internal, instance=Part-1-1, generate
  13,  390,   13
*Elset, elset=_Surf-top_S3, internal, instance=Part-1-1
 391, 392, 393, 394, 395, 396
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*Elset, elset=_Surf-top_S2, internal, instance=Part-1-1, generate
 1501,  1600,     1
*Surface, type=ELEMENT, name=Surf-top
_Surf-top_S4, S4
_Surf-top_S3, S3
_Surf-top_S2, S2
*Elset, elset=_Surf-2_S2, internal, instance=Part-1-1
    1,    2,    3,    4,    5,    6
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*Elset, elset=_Surf-2_S4, internal, instance=Part-1-1, generate
  13,  390,   13
*Elset, elset=_Surf-2_S3, internal, instance=Part-1-1
 391, 392, 393, 394, 395, 396
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*Surface, type=ELEMENT, name=Surf-2
_Surf-2_S2, S2
_Surf-2_S4, S4
_Surf-2_S3, S3
*End Assembly
**
** MATERIALS
**
*Material, name=Concrete_com
*Depvar
     65,
*User Material, constants=9
 5.3622e+10,   0.2178,    8178.,  0.00231,     34.4,     615., 3.29e-05,      10.
      10.,
**
** BOUNDARY CONDITIONS
**
** Name: BC-2 Type: Symmetry/Antisymmetry/Encastre
*Boundary
Set-y, YSYMM
** Name: BC-Z Type: Symmetry/Antisymmetry/Encastre
*Boundary
Set-bottom, ZSYMM
** Name: BC-x Type: Symmetry/Antisymmetry/Encastre
*Boundary
Set-X, XSYMM
** ----------------------------------------------------------------
**
** STEP: Step-1
**
*Step, name=Step-1, nlgeom=YES, inc=1000000
*Static
0.001, 1., 1e-20, 0.05
**
** LOADS
**
** Name: Load-3   Type: Pressure
*Dsload
Surf-2, P, 4e+06
**
** CONTROLS
**
*Controls, reset
*Controls, parameters=time incrementation
, , , , , , , 15, , ,
**
** OUTPUT REQUESTS
**
*Restart, write, frequency=0
**
** FIELD OUTPUT: F-Output-1
**
*Output, field, frequency=5
*Node Output
U,
*Element Output, directions=YES
E, S, SDV
**
** HISTORY OUTPUT: H-Output-1
**
*Output, history, variable=PRESELECT
*End Step
** ----------------------------------------------------------------
**
** STEP: Step-2
**
*Step, name=Step-2, nlgeom=YES, inc=100000
*Static
0.001, 1., 1e-10, 0.005
**
** BOUNDARY CONDITIONS
**
** Name: BC-5 Type: Displacement/Rotation
*Boundary
Set-4, 1, 1
Set-4, 2, 2
Set-4, 3, 3, -0.0003
**
** OUTPUT REQUESTS
**
*Restart, write, frequency=0
**
** FIELD OUTPUT: F-Output-1
**
*Output, field, frequency=5
*Node Output
U,
*Element Output, directions=YES
E, S, SDV
**
** HISTORY OUTPUT: H-Output-1
**
*Output, history, variable=PRESELECT
*End Step
