*Heading
** Job name: composite_para_fine Model name: Model-composite
** Generated by: Abaqus/CAE 6.12-1
*Preprint, echo=NO, model=NO, history=NO, contact=NO
**
** PARTS
**
*Part, name=Part-composite
*Node
      1,         0.25,         0.25,  0.100000001
      2,  0.200000003,         0.25,  0.100000001
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*Element, type=C3D8
 1,   84, 1029, 4731, 1023,    1,   73, 1021,   76
 2, 1029,   90, 1026, 4731,   73,    2,   74, 1021
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*Nset, nset=Set-1
    1,    2,    3,    4,    5,    6
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*Elset, elset=Set-1
  369,  370,  371,  372,  373,  374
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*Nset, nset=Set-2
    1,    2,    3,    4,    5,    6
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*Elset, elset=Set-2
    1,    2,    3,    4,    5,    6
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** Section: Elas
*Solid Section, elset=Set-2, material=Elas
,
** Section: Base
*Solid Section, elset=Set-1, material=Weak_base
,
*End Part
**
**
** ASSEMBLY
**
*Assembly, name=Assembly
**
*Instance, name=Part-composite-1, part=Part-composite
*End Instance
**
*Nset, nset=Set-X, instance=Part-composite-1
   21,   22,   23,   24,   29,   30
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*Elset, elset=Set-X, instance=Part-composite-1
  255,  256,  271,  272,  287,  288
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*Nset, nset=Set-y, instance=Part-composite-1
   25,   26,   27,   28,   29,   31
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*Elset, elset=Set-y, instance=Part-composite-1
  305,  313,  321,  329,  337,  345
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*Nset, nset=Set-3, instance=Part-composite-1
   61,   62,   63,   64,   65,   66
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*Elset, elset=Set-3, instance=Part-composite-1
 4481, 4489, 4497, 4505, 4513, 4521
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*Nset, nset=Set-4, instance=Part-composite-1
    9,   12,   15,   16,   37,   39
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*Elset, elset=Set-4, instance=Part-composite-1
   17,   25,   33,   41,   49,   57
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*Elset, elset=_Surf-X_S1, internal, instance=Part-composite-1
 5433, 5434, 5435, 5436, 5437, 5438
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*Elset, elset=_Surf-X_S6, internal, instance=Part-composite-1, generate
 4481,  4729,     8
*Surface, type=ELEMENT, name=Surf-X
_Surf-X_S1, S1
_Surf-X_S6, S6
*Elset, elset=_Surf-Y_S6, internal, instance=Part-composite-1
   17,   25,   33,   41,   49,   57,   65,   73, 3137, 3145, 3153, 3161, 3169, 3177, 3185, 3193
*Elset, elset=_Surf-Y_S4, internal, instance=Part-composite-1
  808,  816,  824,  832,  840,  848
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*Elset, elset=_Surf-Y_S5, internal, instance=Part-composite-1
 5533, 5534, 5535, 5536, 5565, 5566
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*Surface, type=ELEMENT, name=Surf-Y
_Surf-Y_S6, S6
_Surf-Y_S4, S4
_Surf-Y_S5, S5
*End Assembly
**
** MATERIALS
**
*Material, name=Elas
*Elastic
 5e+10, 0.3
*Material, name=Weak_base
*Depvar
     65,
*User Material, constants=9
 3.5e+10,  0.25,  120., 0.001,  234.,  123., 2e-05,   20.
   24.,
**
** BOUNDARY CONDITIONS
**
** Name: BC-x Type: Symmetry/Antisymmetry/Encastre
*Boundary
Set-X, XSYMM
** Name: BC-y Type: Symmetry/Antisymmetry/Encastre
*Boundary
Set-y, YSYMM
** ----------------------------------------------------------------
**
** STEP: Step-1
**
*Step, name=Step-1, nlgeom=YES, inc=1000000
*Static
0.001, 1., 1e-20, 0.005
**
** BOUNDARY CONDITIONS
**
** Name: BC-3 Type: Displacement/Rotation
*Boundary
Set-3, 1, 1
** Name: BC-4 Type: Displacement/Rotation
*Boundary
Set-4, 2, 2, 5e-05
**
** CONTROLS
**
*Controls, reset
*Controls, parameters=time incrementation
, , , , , , , 15, , ,
**
** OUTPUT REQUESTS
**
*Restart, write, frequency=10
**
** FIELD OUTPUT: F-Output-1
**
*Output, field, frequency=10
*Node Output
U,
*Element Output, directions=YES
E, S, SDV
**
** HISTORY OUTPUT: H-Output-1
**
*Output, history, variable=PRESELECT
*End Step
